log             log.opt_C7ax append
units           real
atom_style      full
boundary        p p p

pair_style      lj/cut 12.500
bond_style      harmonic
angle_style     hybrid cosine/periodic fourier
dihedral_style  harmonic
improper_style  fourier


pair_modify     tail yes mix arithmetic
special_bonds   lj/coul 0.0 0.0 1.0
dielectric      1.0
box tilt        large
read_data       data.opt_C7ax

#### Atom Groupings ####
group           1        id   1:22
#### END Atom Groupings ####
include "system.in.run"
